solve block
    # guess values
    E1 := 3
    i1 := 0.5
    E2 := 2.3
    i2 := 0
    R1 := 27
    i3 := 0
    R2 := 56
    i4 := 0
    R3 := 24
    i5 := 0
    R4 := 39
    i6 := 0
    R5 := 39
    i7 := 0
    R6 := 75
    i8 := 0
    R7 := 43
    i9 := 0
    R8 := 47
    i10 := 0
    R9 := 56
    i11 := 0
    R10 := 76
    # constraints
    i1 + i2 + i4 + i6 + i9 == 0
    i3 - i2 - i11 == 0
    -i3 - i10 - i7 - i1 == 0
    i11 - i4 - i5 == 0
    i5 - i6 - i8 + i7 == 0
    i4*R4 - i2*R2 == E1
    i5*R5 + i6*R6 - i4*R4 == 0
    i8*R8 + i9*R9 - i6*R6 == E2
    i7*R7 - i5*R5 - i3*R3 == -E1
    i10*R10 - i8*R8 - i7*R7 == -E2
    # solver
    i := Find(i1, i2, i3, i4, i5, i6, i7, i8, i9, i10, i11) = [0.5; -0.152203; -0.237576; -0.141624; 0.0562509; -0.102895; -0.15135; 0.00779619; -0.103278; -0.111074; -0.0853735]
    i(0) + i(1) + i(3) + i(5) + i(8) = 2.77556e-17
    i(2) - i(1) - i(10) = -1.38778e-17
    -i(2) - i(9) - i(6) - i(0) = 0
    i(10) - i(3) - i(4) = 6.93889e-18
    i(4) - i(5) - i(7) + i(6) = 0
    i(7) + i(9) - i(8) = -2.77556e-17
end solve block
